*Heading
** Job name: DCB_coarse Model name: Model-1
** Generated by: Abaqus/CAE 2019
*Preprint, echo=NO, model=NO, history=NO, contact=NO
**
** PARTS
**
*Part, name=auelPart1
*Node
1, 30.0, 20.0, 0.0
2, 31.0, 20.0, 0.0
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*USER ELEMENT, TYPE=U308, NODES=8, COORDINATES=3, PROPERTIES=10, IPROPERTIES=1, VARIABLES=1
1,2,3
*ELEMENT, TYPE=U308, ELSET=auelPart1
1, 72, 73, 2, 1, 1563, 1564, 1493, 1492
2, 73, 74, 3, 2, 1564, 1565, 1494, 1493
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*Nset, nset=CE-all, generate
    1,  2982,     1
*UEL PROPERTY, ELSET=auelPart1
1.0e6, 57., 57., 0.28, 0.28, 1.0, 0.0, 0.0
1.0, 1.0, 1
** K,  tnc, tsc, Gnc,  Gsc, alpha, neta, cof
** dmax, power_fg, part_id
*Elset, elset=CE-all, generate
    1,  1400,     1
*Nset, nset=ce-bot, generate
    1,  1491,     1
*Nset, nset=ce-top, generate
 1492,  2982,     1
** Section: CE
*Cohesive Section, elset=CE-all, controls=EC-1, material=CE, response=TRACTION SEPARATION
,
*End Part
**
** end of auelPart **
*Part, name=bot
*Node
      1,         100.,          20.,          1.5
      2,         100.,          19.,          1.5
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*Element, type=C3D8
   1,   106,   107,   128,   127,     1,     2,    23,    22
   2,   107,   108,   129,   128,     2,     3,    24,    23
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*Nset, nset=_PickedSet6, internal, generate
     1,  10605,      1
*Elset, elset=_PickedSet6, internal, generate
    1,  8000,     1
*Nset, nset=bot-load, generate
 10585,  10605,      1
*Elset, elset=bot-load, generate
 7981,  8000,     1
*Elset, elset=_bot-tie_S3, internal
    1,    2,    3,    4,    5,    6
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*Surface, type=ELEMENT, name=bot-tie
_bot-tie_S3, S3
*Orientation, name=Ori-1
1., 0., 0., 0., 1., 0.
1, 0.
** Section: solid
*Solid Section, elset=_PickedSet6, orientation=Ori-1, material=solid
,
*End Part
**
*Part, name=top
*Node
      1,         100.,          20.,          1.5
      2,         100.,          19.,          1.5
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*Element, type=C3D8
   1,   106,   107,   128,   127,     1,     2,    23,    22
   2,   107,   108,   129,   128,     2,     3,    24,    23
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*Nset, nset=_PickedSet17, internal, generate
     1,  10605,      1
*Elset, elset=_PickedSet17, internal, generate
    1,  8000,     1
*Nset, nset=top-load, generate
 10501,  10521,      1
*Elset, elset=top-load, generate
 7921,  7940,     1
*Elset, elset=_top-tie_S5, internal
   61,   62,   63,   64,   65,   66
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*Surface, type=ELEMENT, name=top-tie
_top-tie_S5, S5
*Orientation, name=Ori-1
1., 0., 0., 0., 1., 0.
1, 0.
** Section: solid
*Solid Section, elset=_PickedSet17, orientation=Ori-1, material=solid
,
*End Part
**
**
** ASSEMBLY
**
*Assembly, name=Assembly
**
*Instance, name=auelPart1-1, part=auelPart1
*End Instance
**
*Instance, name=bot-1, part=bot
          0.,           0.,         -1.5
*End Instance
**
*Instance, name=top-1, part=top
*End Instance
**
*Nset, nset=fix-bc, instance=bot-1, generate
   1,  105,    1
*Nset, nset=fix-bc, instance=top-1, generate
   1,  105,    1
*Elset, elset=fix-bc, instance=bot-1, generate
  1,  80,   1
*Elset, elset=fix-bc, instance=top-1, generate
  1,  80,   1
*Surface, type=NODE, name=auelPart1-1_ce-bot_CNS_, internal
auelPart1-1.ce-bot, 1.
*Surface, type=NODE, name=auelPart1-1_ce-top_CNS_, internal
auelPart1-1.ce-top, 1.
** Constraint: Constraint-1
*Tie, name=Constraint-1, adjust=no
auelPart1-1_ce-bot_CNS_, bot-1.bot-tie
** Constraint: Constraint-2
*Tie, name=Constraint-2, adjust=no
auelPart1-1_ce-top_CNS_, top-1.top-tie
*End Assembly
**
** ELEMENT CONTROLS
**
*Section Controls, name=EC-1, VISCOSITY=5e-05
1., 1., 1.
**
** MATERIALS
**
*Material, name=CE
*Damage Initiation, criterion=QUADS
57.,57.,57.
*Damage Evolution, type=ENERGY, mixed mode behavior=BK, power=1.
 0.28, 0.28, 0.28
*Damage Stabilization
0.0001
*Elastic, type=TRACTION
 1e+06, 1e+06, 1e+06
*Material, name=Umat
*Depvar
      6,
*User Material, constants=10
 1e+06,    57.,    57.,   0.28,   0.28,     1., 0.0001,     0.
     1.,     1.
*Material, name=solid
*Elastic, type=ENGINEERING CONSTANTS
135300.,9000.,9000., 0.24, 0.24, 0.46,5200.,5200.
3080.,
**
** BOUNDARY CONDITIONS
**
** Name: BC-3 Type: Displacement/Rotation
*Boundary
fix-bc, 1, 1
fix-bc, 2, 2
fix-bc, 3, 3
** ----------------------------------------------------------------
**
** STEP: Step-1
**
*Step, name=Step-1, nlgeom=NO, inc=10000
*Static
0.001, 1., 1e-07, 0.001
**
** BOUNDARY CONDITIONS
**
** Name: BC-1 Type: Displacement/Rotation
*Boundary
top-1.top-load, 3, 3, 10.
** Name: BC-2 Type: Displacement/Rotation
*Boundary
bot-1.bot-load, 3, 3, -10.
**
** CONTROLS
**
*Controls, reset
*Controls, parameters=time incrementation
20, 30, 5, 40, 40, , , 20, , ,
*Controls, parameters=field, field=displacement
0.02, 0.02, , , 0.04, , ,
*Controls, parameters=field, field=hydrostatic fluid pressure
0.02, 0.02, , , 0.04, , ,
*Controls, parameters=field, field=rotation
0.02, 0.02, , , 0.04, , ,
*Controls, parameters=field, field=electrical potential
0.02, 0.02, , , 0.04, , ,
**
** OUTPUT REQUESTS
**
*Restart, write, frequency=0
**
** FIELD OUTPUT: F-Output-1
**
*Output, field
*Node Output
CF, RF, U
*Element Output, directions=YES
LE, PE, PEEQ, PEMAG, S, SDV
*Contact Output
CDISP, CSTRESS
**
** HISTORY OUTPUT: H-Output-1
**
*Output, history, variable=PRESELECT
*End Step
